*Heading
 fatigue-tree2 paper #2 Appendix A: ABAQUS validation case val_rd70_e095
 r_d/R = 0.70, e_norm = 0.95
 Generated by 08_abaqus_validation_setup.py
**
*Part, name=SECTION
*Node
 1, -0.1125000000, -1.0000000000
 2, -0.1000000000, -1.0000000000
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*Element, type=CPS4R, elset=ALL
 1, 4920, 4921, 4973, 4972
 2, 4972, 4973, 5024, 5023
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*Solid Section, elset=ALL, material=WOOD
1.0000
*End Part
**
*Material, name=WOOD
*Density
1.0000
*Elastic
9.5e9, 0.3
**
*Assembly, name=ASSEMBLY
*Instance, name=SEC-1, part=SECTION
*End Instance
*End Assembly
**
*Step, name=trivial, perturbation=NO
*Static
1.0, 1.0, 1e-5, 1.0
*Output, field
*Element Output, elset=SEC-1.ALL
EVOL, IVOL, COORD
*End Step
