*Heading
 Tree Model: H=8.0m, DBH=15cm, Multi-axial Kaimal Wind
 F_X_ref=4673.16 N  F_Y_ref=1639.40 N
 Generated by generate_inp_cases.py
**
** ============================================================
** NODES
** ============================================================
*Node
 1,  0., 0., 0.000000
 2,  0., 0., 0.800000
 3,  0., 0., 1.600000
 4,  0., 0., 2.400000
 5,  0., 0., 3.200000
 6,  0., 0., 4.000000
 7,  0., 0., 4.800000
 8,  0., 0., 5.600000
 9,  0., 0., 6.400000
 10,  0., 0., 7.200000
 11,  0., 0., 8.000000
**
** ============================================================
** ELEMENTS - TRUNK (B31 beam, Z-axis)
** ============================================================
*Element, type=B31, elset=TRUNK
 1, 1, 2
 2, 2, 3
 3, 3, 4
 4, 4, 5
 5, 5, 6
 6, 6, 7
 7, 7, 8
 8, 8, 9
 9, 9, 10
 10, 10, 11
**
*Element, type=MASS, elset=CROWN_MASS_ELEM
 101, 11
**
** ============================================================
** ELEMENT SETS (1 per element for tapered sections)
** ============================================================
*Elset, elset=E1
 1,
*Elset, elset=E2
 2,
*Elset, elset=E3
 3,
*Elset, elset=E4
 4,
*Elset, elset=E5
 5,
*Elset, elset=E6
 6,
*Elset, elset=E7
 7,
*Elset, elset=E8
 8,
*Elset, elset=E9
 9,
*Elset, elset=E10
 10,
**
** ============================================================
** NODE SETS
** ============================================================
*Nset, nset=BASE
 1,
*Nset, nset=TIP
 11,
**
** ============================================================
** BEAM SECTIONS (tapered, CIRC, n1=(1,0,0))
** ============================================================
*Beam Section, elset=E1, material=WOOD, section=CIRC
 0.086625,
 1.0, 0.0, 0.0
*Beam Section, elset=E2, material=WOOD, section=CIRC
 0.079875,
 1.0, 0.0, 0.0
*Beam Section, elset=E3, material=WOOD, section=CIRC
 0.073125,
 1.0, 0.0, 0.0
*Beam Section, elset=E4, material=WOOD, section=CIRC
 0.066375,
 1.0, 0.0, 0.0
*Beam Section, elset=E5, material=WOOD, section=CIRC
 0.059625,
 1.0, 0.0, 0.0
*Beam Section, elset=E6, material=WOOD, section=CIRC
 0.052875,
 1.0, 0.0, 0.0
*Beam Section, elset=E7, material=WOOD, section=CIRC
 0.046125,
 1.0, 0.0, 0.0
*Beam Section, elset=E8, material=WOOD, section=CIRC
 0.039375,
 1.0, 0.0, 0.0
*Beam Section, elset=E9, material=WOOD, section=CIRC
 0.032625,
 1.0, 0.0, 0.0
*Beam Section, elset=E10, material=WOOD, section=CIRC
 0.025875,
 1.0, 0.0, 0.0
**
** ============================================================
** MATERIAL
** ============================================================
*Material, name=WOOD
*Elastic
 4.7600e+09, 0.35
*Density
 780.0,
** Rayleigh damping: zeta=2% at f1 range (Sellier & Fourcaud 2009)
** alpha=0.0754, beta=0.00472  -> zeta~2% at 0.3~1.0 Hz
*Damping, alpha=0.0754, beta=0.00472
**
** ============================================================
** CROWN MASS
** ============================================================
*Mass, elset=CROWN_MASS_ELEM
 112.50,
**
** ============================================================
** BOUNDARY CONDITIONS (base: fully fixed)
** ============================================================
*Boundary
 1, 1, 6
**
** ============================================================
** AMPLITUDE - KAIMAL X (mean + turbulence, always >= 0)
** F_X_ref = 4673.16 N  (Cload ???)
** A_crown = 12.00 m2, U_bar = 20.0 m/s
** ============================================================
*Amplitude, name=KAIMAL_X, definition=TABULAR
0.0000, +0.326263, 0.0500, +0.300051, 0.1000, +0.309596, 0.1500, +0.260496
0.2000, +0.326674, 0.2500, +0.300196, 0.3000, +0.295094, 0.3500, +0.306814
0.4000, +0.290108, 0.4500, +0.292515, 0.5000, +0.253359, 0.5500, +0.329695
0.6000, +0.230817, 0.6500, +0.200739, 0.7000, +0.235581, 0.7500, +0.273639
0.8000, +0.234345, 0.8500, +0.201336, 0.9000, +0.166295, 0.9500, +0.163844
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599.8000, +0.278949, 599.8500, +0.330081, 599.9000, +0.310156, 599.9500, +0.380142
**
** ============================================================
** AMPLITUDE - KAIMAL Y (lateral turbulence only, bidirectional)
** F_Y_ref = 1639.40 N  (Cload ???)
** sigma_v = 3.00 m/s  (= 0.75 x sigma_u)
** ============================================================
*Amplitude, name=KAIMAL_Y, definition=TABULAR
0.0000, -0.141620, 0.0500, -0.054524, 0.1000, -0.088703, 0.1500, -0.015910
0.2000, +0.156332, 0.2500, +0.140301, 0.3000, +0.198562, 0.3500, +0.167995
0.4000, +0.133549, 0.4500, +0.049526, 0.5000, -0.041070, 0.5500, -0.218762
0.6000, -0.127304, 0.6500, -0.099877, 0.7000, -0.148481, 0.7500, -0.234480
0.8000, -0.209986, 0.8500, -0.360979, 0.9000, -0.270719, 0.9500, -0.372940
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599.8000, +0.256484, 599.8500, +0.147386, 599.9000, +0.224921, 599.9500, +0.057541
**
** ============================================================
** STEP 1: MODAL ANALYSIS (?????)
** ============================================================
*Step, name=FREQUENCY, perturbation
*Frequency, eigensolver=Lanczos, normalization=displacement
 5,
*Output, field
*Node Output
 U,
*End Step
**
** ============================================================
** STEP 2: WIND DYNAMIC ANALYSIS
** ============================================================
*Step, name=WIND_DYNAMIC, nlgeom=NO, inc=15000
*Dynamic, direct
 0.05, 600.0
**
** X-direction: mean wind + turbulence
*Cload, amplitude=KAIMAL_X
 11, 1, 4673.1612
**
** Y-direction: lateral turbulence only
*Cload, amplitude=KAIMAL_Y
 11, 2, 1639.4020
**
*Output, field, frequency=100
*Node Output
 U, V, A
*Element Output, elset=TRUNK
 SF, SM
**
*Output, history, frequency=1
** Base element: bending moment SM1, SM2
*Element Output, elset=E1
 SF1, SF2, SF3, SM1, SM2
** Tip displacement
*Node Output, nset=TIP
 U1, U2
** Base reaction force
*Node Output, nset=BASE
 RF1, RF2
*End Step
